# OpenSim document version 40000
ExternalLoads:
  datafile: C:\Users\uqglicht_local\OneDrive - The University of Queensland\Documents\Data\UQ_Lowerlimb\Data\pws01_tracked_grf.mot
  ExternalForce calcn_r1_ground_force_v: applied_to_body=calcn_r force_expressed_in_body=ground
      point_expressed_in_body=ground force_identifier=calcn_r1_ground_force_v point_identifier=calcn_r1_ground_force_p
      torque_identifier=calcn_r1_ground_torque_
  ExternalForce calcn_l1_ground_force_v: applied_to_body=calcn_l force_expressed_in_body=ground
      point_expressed_in_body=ground force_identifier=calcn_l1_ground_force_v point_identifier=calcn_l1_ground_force_p
      torque_identifier=calcn_l1_ground_torque_
  ExternalForce calcn_r2_ground_force_v: applied_to_body=calcn_r force_expressed_in_body=ground
      point_expressed_in_body=ground force_identifier=calcn_r2_ground_force_v point_identifier=calcn_r2_ground_force_p
      torque_identifier=calcn_r2_ground_torque_
  ExternalForce calcn_l2_ground_force_v: applied_to_body=calcn_l force_expressed_in_body=ground
      point_expressed_in_body=ground force_identifier=calcn_l2_ground_force_v point_identifier=calcn_l2_ground_force_p
      torque_identifier=calcn_l2_ground_torque_
