# OpenSim document version 20302
AnalyzeTool TD3_SCALED:
  model_file: TD3_SCALED.osim
  replace_force_set: false
  results_directory: MuscleAnalysis
  output_precision: 8
  initial_time: 0.005
  final_time: 4.355
  solve_for_equilibrium_for_auxiliary_states: false
  maximum_number_of_integrator_steps: 20000
  maximum_integrator_step_size: 1
  minimum_integrator_step_size: 1e-8
  integrator_error_tolerance: 1e-5
  coordinates_file: C:\Users\s4284085\Documents\OpenSim\UQ_Lowerlimb\Data\pws01_tracked_ik.mot
  lowpass_cutoff_frequency_for_coodinates: 6
  AnalysisSet Analyses:
    MuscleAnalysis: start_time=0.005 end_time=4.355 step_interval=1 in_degrees=true muscle_list=all
        compute_moments=false
