# OpenSim document version 20302
ScaleTool TD3:
  mass: 40.695
  height: 1.8
  GenericModelMaker:
    model_file: C:\Users\s4284085\Documents\OpenSim\UQ_Lowerlimb\UQ_Lowerlimb.osim
  ModelScaler:
    apply: true
    scaling_order: measurements
    marker_file: C:\Users\s4284085\Documents\OpenSim\UQ_Lowerlimb\Data\static.trc
    time_range: 0.005 0.2
    preserve_mass_distribution: true
    output_scale_file: TD3_ScaleSet_Applied.xml
    MeasurementSet:
      Measurement pelvis_w: apply=true
        MarkerPair: markers=(LASI RASI)
        BodyScale pelvis: axes=Z
      Measurement pelvis_d: apply=true
        MarkerPair: markers=(RASI RPSI)
        MarkerPair: markers=(LASI LPSI)
        BodyScale pelvis: axes=X
      Measurement pelvis_h: apply=true
        MarkerPair: markers=(LASI LGT)
        MarkerPair: markers=(RASI RGT)
        BodyScale pelvis: axes=Y
      Measurement femur_r: apply=true
        MarkerPair: markers=(RGT RLKN)
        MarkerPair: markers=(RASI RMKN)
        BodyScale femur_r: axes=(X Y Z)
        BodyScale patella_r: axes=(X Y Z)
      Measurement tibia_r: apply=true
        MarkerPair: markers=(RLKN RLMAL)
        MarkerPair: markers=(RMKN RMMAL)
        BodyScale tibia_r: axes=(X Y Z)
      Measurement foot_r_h: apply=true
        MarkerPair: markers=(RLMAL RHEEL)
        MarkerPair: markers=(RMMAL RHEEL)
        BodyScale talus_r: axes=Y
        BodyScale calcn_r: axes=Y
        BodyScale midfoot_r: axes=Y
        BodyScale forefoot_r: axes=Y
        BodyScale toes_r: axes=Y
      Measurement foot_r_w: apply=true
        MarkerPair: markers=(RMET5 RMET1)
        BodyScale talus_r: axes=Z
        BodyScale calcn_r: axes=Z
        BodyScale midfoot_r: axes=Z
        BodyScale forefoot_r: axes=Z
        BodyScale toes_r: axes=Z
      Measurement foot_r_d: apply=true
        MarkerPair: markers=(RHEEL RMET1)
        MarkerPair: markers=(RHEEL RMET5)
        BodyScale talus_r: axes=X
        BodyScale calcn_r: axes=X
        BodyScale midfoot_r: axes=X
        BodyScale forefoot_r: axes=X
        BodyScale toes_r: axes=X
      Measurement femur_l: apply=true
        MarkerPair: markers=(LGT LLKN)
        MarkerPair: markers=(LASI LMKN)
        BodyScale femur_l: axes=(X Y Z)
        BodyScale patella_l: axes=(X Y Z)
      Measurement tibia_l: apply=true
        MarkerPair: markers=(LLKN LLMAL)
        MarkerPair: markers=(LMKN LMMAL)
        BodyScale tibia_l: axes=(X Y Z)
      Measurement foot_l_h: apply=true
        MarkerPair: markers=(LLMAL LHEEL)
        MarkerPair: markers=(LMMAL LHEEL)
        BodyScale talus_l: axes=Y
        BodyScale calcn_l: axes=Y
        BodyScale midfoot_l: axes=Y
        BodyScale forefoot_l: axes=Y
        BodyScale toes_l: axes=Y
      Measurement foot_l_w: apply=true
        MarkerPair: markers=(LMET5 LMET1)
        BodyScale talus_l: axes=Z
        BodyScale calcn_l: axes=Z
        BodyScale midfoot_l: axes=Z
        BodyScale forefoot_l: axes=Z
        BodyScale toes_l: axes=Z
      Measurement foot_l_d: apply=true
        MarkerPair: markers=(LHEEL LMET1)
        MarkerPair: markers=(LHEEL LMET5)
        BodyScale talus_l: axes=X
        BodyScale calcn_l: axes=X
        BodyScale midfoot_l: axes=X
        BodyScale forefoot_l: axes=X
        BodyScale toes_l: axes=X
  MarkerPlacer:
    marker_file: C:\Users\s4284085\Documents\OpenSim\UQ_Lowerlimb\Data\static.trc
    time_range: 0.005 0.2
    output_model_file: TD3_SCALED.osim
    output_motion_file: TD3_static_output.mot
    output_marker_file: TD3_static_output.xml
    max_marker_movement: -1
    IKTaskSet:
      IKMarkerTask LASI: apply=true weight=10
      IKMarkerTask RASI: apply=true weight=10
      IKMarkerTask LPSI: apply=true weight=5
      IKMarkerTask RPSI: apply=true weight=5
      IKMarkerTask LTHI1: apply=false weight=0
      IKMarkerTask LTHI2: apply=false weight=0
      IKMarkerTask LTHI3: apply=false weight=0
      IKMarkerTask LLKN: apply=true weight=1
      IKMarkerTask LMKN: apply=true weight=0.5
      IKMarkerTask LSHA1: apply=false weight=0
      IKMarkerTask LSHA2: apply=false weight=0
      IKMarkerTask LSHA3: apply=false weight=0
      IKMarkerTask LLMAL: apply=true weight=2
      IKMarkerTask LMMAL: apply=true weight=2
      IKMarkerTask LHEEL: apply=true weight=5
      IKMarkerTask LMET1: apply=true weight=2
      IKMarkerTask LMET5: apply=true weight=2
      IKMarkerTask RTHI1: apply=false weight=0
      IKMarkerTask RTHI2: apply=false weight=0
      IKMarkerTask RTHI3: apply=false weight=0
      IKMarkerTask RLKN: apply=true weight=1
      IKMarkerTask RMKN: apply=true weight=0.5
      IKMarkerTask RSHA1: apply=false weight=0
      IKMarkerTask RSHA2: apply=false weight=0
      IKMarkerTask RSHA3: apply=false weight=0
      IKMarkerTask RLMAL: apply=true weight=2
      IKMarkerTask RMMAL: apply=true weight=2
      IKMarkerTask RHEEL: apply=true weight=5
      IKMarkerTask RMET1: apply=true weight=2
      IKMarkerTask RMET5: apply=true weight=2
