# OpenSim document version 40000
Model UQ_Lowerlimb:
  gravity: 0 -9.80665 0
  length_units: meters
  force_units: N
  credits:
    Delp, S.L., Loan, J.P., Hoy, M.G., Zajac, F.E., Topp E.L., Rosen, J.M.
  publications:
    An interactive graphics-based model of the lower extremity to study orthopaedic surgical procedures. IEEE Transactions on Biomedical Engineering, vol. 37, pp. 757-767, 1990.
  Ground: meshes=treadmill.vtp
  BodySet:
    Body pelvis: mass=11.777 [kg] mass_center=(-0.0707 0 0) inertia=(0.1028 0.0871 0.0579 0 0 0)
        meshes=(sacrum.vtp pelvis.vtp l_pelvis.vtp)
    Body femur_r: mass=9.3014 mass_center=(0 -0.17 0) inertia=(0.1339 0.0351 0.1412 0 0 0) meshes=femur.vtp
    Body tibia_r: mass=3.7075 mass_center=(0 -0.1867 0) inertia=(0.0504 0.0051 0.0511 0 0 0)
        meshes=(tibia.vtp fibula.vtp)
    Body talus_r: mass=0.09658802 mass_center=(0 0 0) inertia=(0.00119861 0.00119861 0.00119861 0 0 0)
        meshes=r_talus.vtp
    Body calcn_r: mass=0.6 mass_center=(0.03 0.025 0) inertia=(0.0005 0.0015 0.0002 0 0 0) meshes=calcaneous_rv.vtp
    Body midfoot_r: mass=0.2092096 mass_center=(0.0155371 0.00616251 0)
        inertia=(0.00010189 0.00020378 0.00101891 0 0 0) meshes=midfoot_rv.vtp
    Body forefoot_r: mass=0.4092096 mass_center=(0.0355371 0 0) inertia=(0.00010189 0.00020378 0.00101891 0 0 0)
        meshes=forefoot_rv.vtp
    Body toes_r: mass=0.15 mass_center=(0.0125 0 0) inertia=(5.189e-5 0.00010378 0.00051891 0 0 0) meshes=digits_rv.vtp
    Body femur_l: mass=9.3014 mass_center=(0 -0.17 0) inertia=(0.1339 0.0351 0.1412 0 0 0) meshes=l_femur.vtp
    Body tibia_l: mass=3.7075 mass_center=(0 -0.1867 0) inertia=(0.0504 0.0051 0.0511 0 0 0)
        meshes=(l_tibia.vtp l_fibula.vtp)
    Body talus_l: mass=0.09658802 mass_center=(0 0 0) inertia=(0.00119861 0.00119861 0.00119861 0 0 0)
        meshes=l_talus.vtp
    Body calcn_l: mass=0.6 mass_center=(0.03 0.025 0) inertia=(0.0005 0.0015 0.0002 0 0 0) meshes=calcaneous_lv.vtp
    Body midfoot_l: mass=0.2092096 mass_center=(0.0155371 0.00616251 0)
        inertia=(0.00010189 0.00020378 0.00101891 0 0 0) meshes=midfoot_lv.vtp
    Body forefoot_l: mass=0.4092096 mass_center=(0.0355371 0 0) inertia=(0.00010189 0.00020378 0.00101891 0 0 0)
        meshes=forefoot_lv.vtp
    Body toes_l: mass=0.15 mass_center=(0.0125 0 0) inertia=(5.189e-5 0.00010378 0.00051891 0 0 0) meshes=digits_lv.vtp
  JointSet:
    CustomJoint ground_pelvis: socket_parent_frame=ground_offset socket_child_frame=pelvis_offset
      Coordinate pelvis_tilt: default_value=0 range=(-1.570796 1.570796) clamped=false
      Coordinate pelvis_list: default_value=0 range=(-1.570796 1.570796) clamped=false
      Coordinate pelvis_rotation: default_value=2.109056e-26 range=(-3.1416 3.1416) clamped=false
      Coordinate pelvis_tx: default_value=0 range=(-5 5) clamped=false
      Coordinate pelvis_ty: default_value=0.94 range=(-3 3) clamped=false
      Coordinate pelvis_tz: default_value=0 range=(-3 3) clamped=false
      PhysicalOffsetFrame ground_offset: socket_parent=/ground translation=(0 0 0) [meters]
      PhysicalOffsetFrame pelvis_offset: socket_parent=/bodyset/pelvis translation=(0 0 0)
      SpatialTransform:
        TransformAxis rotation1: coordinates=pelvis_tilt axis=(0 0 1) LinearFunction(coefficients=1 0)
        TransformAxis rotation2: coordinates=pelvis_list axis=(1 0 0) LinearFunction(coefficients=1 0)
        TransformAxis rotation3: coordinates=pelvis_rotation axis=(0 1 0) LinearFunction(coefficients=1 0)
        TransformAxis translation1: coordinates=pelvis_tx axis=(1 0 0) LinearFunction(coefficients=1 0)
        TransformAxis translation2: coordinates=pelvis_ty axis=(0 1 0) LinearFunction(coefficients=1 0)
        TransformAxis translation3: coordinates=pelvis_tz axis=(0 0 1) LinearFunction(coefficients=1 0)
    CustomJoint hip_r: socket_parent_frame=pelvis_offset socket_child_frame=femur_r_offset
      Coordinate hip_flexion_r: default_value=0 range=(-2.094395 2.094395) clamped=false
      Coordinate hip_adduction_r: default_value=-4.717423e-29 range=(-2.094395 2.094395) clamped=false
      Coordinate hip_rotation_r: default_value=-2.264125e-29 range=(-2.094395 2.094395) clamped=false
      PhysicalOffsetFrame pelvis_offset: socket_parent=/bodyset/pelvis translation=(-0.0707 -0.0661 0.0835)
      PhysicalOffsetFrame femur_r_offset: socket_parent=/bodyset/femur_r translation=(0 0 0)
      SpatialTransform: axes_held_at_zero=(translation1 translation2 translation3)
        TransformAxis rotation1: coordinates=hip_flexion_r axis=(0 0 1) LinearFunction(coefficients=1 0)
        TransformAxis rotation2: coordinates=hip_adduction_r axis=(1 0 0) LinearFunction(coefficients=1 0)
        TransformAxis rotation3: coordinates=hip_rotation_r axis=(0 1 0) LinearFunction(coefficients=1 0)
    CustomJoint knee_r: socket_parent_frame=femur_r_offset socket_child_frame=tibia_r_offset
      Coordinate knee_flexion_r: default_value=-1.609381e-11 range=(-2.094395 0.1745329) clamped=false
      Coordinate knee_abduction_r: default_value=0 range=(-0.1745329 0.1745329) clamped=false
      Coordinate knee_rotation_r: default_value=0 range=(-0.1745329 0.1745329) clamped=false
      PhysicalOffsetFrame femur_r_offset: socket_parent=/bodyset/femur_r translation=(0.007 -0.396 0)
      PhysicalOffsetFrame tibia_r_offset: socket_parent=/bodyset/tibia_r translation=(0 0 0)
      SpatialTransform: axes_held_at_zero=translation3
        TransformAxis rotation1: coordinates=knee_flexion_r axis=(0 0 1) LinearFunction(coefficients=1 0)
        TransformAxis rotation2: coordinates=knee_abduction_r axis=(1 0 0) LinearFunction(coefficients=1 0)
        TransformAxis rotation3: coordinates=knee_rotation_r axis=(0 1 0) LinearFunction(coefficients=1 0)
        TransformAxis translation1: coordinates=knee_flexion_r axis=(1 0 0)
          SimmSpline: x=(-2.0944 -1.74533 -1.39626 -1.0472 -0.698132 -0.349066 -0.174533 0.197344 0.337395 0.490178 1.52146 2.0944)
              y=(-0.0032 0.00179 0.00411 0.0041 0.00212 -0.001 -0.0031 -0.005227 -0.005435 -0.005574 -0.005435 -0.00525)
        TransformAxis translation2: coordinates=knee_flexion_r axis=(0 1 0)
          SimmSpline: x=(-2.0944 -1.22173 -0.523599 -0.349066 -0.174533 0.159149 2.0944)
              y=(-0.0032 0.00179 0.00411 0.0041 0.00212 -0.001 -0.0031 -0.005227 -0.005435 -0.005574 -0.005435 -0.00525)
    CustomJoint ankle_r: socket_parent_frame=tibia_r_offset socket_child_frame=talus_r_offset
      Coordinate ankle_flexion_r: default_value=0 range=(-0.5235988 0.5235988) clamped=true
      Coordinate ankle_abduction_r: default_value=0 range=(-0.1745329 0.1745329) clamped=true
      Coordinate ankle_rotation_r: default_value=0 range=(-0.1745329 0.1745329) clamped=true
      PhysicalOffsetFrame tibia_r_offset: socket_parent=/bodyset/tibia_r translation=(0 -0.425 0)
      PhysicalOffsetFrame talus_r_offset: socket_parent=/bodyset/talus_r translation=(0 0 0)
      SpatialTransform: axes_held_at_zero=(translation1 translation2 translation3)
        TransformAxis rotation1: coordinates=ankle_flexion_r axis=(0 0 1) LinearFunction(coefficients=1 0)
        TransformAxis rotation2: coordinates=ankle_abduction_r axis=(1 0 0) LinearFunction(coefficients=1 0)
        TransformAxis rotation3: coordinates=ankle_rotation_r axis=(0 1 0) LinearFunction(coefficients=1 0)
    CustomJoint subtalar_r: socket_parent_frame=talus_r_offset socket_child_frame=calcn_r_offset
      Coordinate subtalar_angle_r: default_value=0 range=(-0.17453 0.3490659) clamped=true
      PhysicalOffsetFrame talus_r_offset: socket_parent=/bodyset/talus_r translation=(-0.005 -0.04 -0.003)
          orientation=(0.043 -0.0872 0) [radians]
      PhysicalOffsetFrame calcn_r_offset: socket_parent=/bodyset/calcn_r translation=(0 0 0)
      SpatialTransform: axes_held_at_zero=(rotation2 rotation3 translation1 translation2 translation3)
        TransformAxis rotation1: coordinates=subtalar_angle_r axis=(0.7357 0.6157 -0.2824)
            LinearFunction(coefficients=1 0)
    CustomJoint tnc_r: socket_parent_frame=calcn_r_offset socket_child_frame=midfoot_r_offset
      Coordinate tnc_angle_r: default_value=0 range=(-0.2618 0.2618) clamped=true locked=true
      PhysicalOffsetFrame calcn_r_offset: socket_parent=/bodyset/calcn_r translation=(0.04 0.015 0)
      PhysicalOffsetFrame midfoot_r_offset: socket_parent=/bodyset/midfoot_r translation=(0 0 0)
      SpatialTransform: axes_held_at_zero=(rotation2 rotation3 translation1 translation2 translation3)
        TransformAxis rotation1: coordinates=tnc_angle_r axis=(0.6901 0.6143 -0.3826) LinearFunction(coefficients=1 0)
    CustomJoint cmj_r: socket_parent_frame=midfoot_r_offset socket_child_frame=forefoot_r_offset
      Coordinate cmj_angle_r: default_value=0 range=(-0.0873 0.0873) clamped=true locked=true
      PhysicalOffsetFrame midfoot_r_offset: socket_parent=/bodyset/midfoot_r
          translation=(0.034763 0.00244041 -0.000238465)
      PhysicalOffsetFrame forefoot_r_offset: socket_parent=/bodyset/forefoot_r translation=(0 0 0)
      SpatialTransform: axes_held_at_zero=(rotation2 rotation3 translation1 translation2 translation3)
        TransformAxis rotation1: coordinates=cmj_angle_r axis=(-0.3368 -0.1736 0.9254) LinearFunction(coefficients=1 0)
    CustomJoint toe_r: socket_parent_frame=forefoot_r_offset socket_child_frame=toes_r_offset
      Coordinate mtp_angle_r: default_value=0 range=(-0.5235988 0.5235988) clamped=true locked=true
      PhysicalOffsetFrame forefoot_r_offset: socket_parent=/bodyset/forefoot_r translation=(0.07 -0.025 -0.005)
      PhysicalOffsetFrame toes_r_offset: socket_parent=/bodyset/toes_r translation=(0 0 0)
      SpatialTransform: axes_held_at_zero=(rotation2 rotation3 translation1 translation2 translation3)
        TransformAxis rotation1: coordinates=mtp_angle_r axis=(0.3741 -0.0523 -0.9259) LinearFunction(coefficients=1 0)
    CustomJoint hip_l: socket_parent_frame=pelvis_offset socket_child_frame=femur_l_offset
      Coordinate hip_flexion_l: default_value=0 range=(-2.094395 2.094395) clamped=false
      Coordinate hip_adduction_l: default_value=0 range=(-2.094395 2.094395) clamped=false
      Coordinate hip_rotation_l: default_value=0 range=(-2.094395 2.094395) clamped=false
      PhysicalOffsetFrame pelvis_offset: socket_parent=/bodyset/pelvis translation=(-0.0707 -0.0661 -0.0835)
      PhysicalOffsetFrame femur_l_offset: socket_parent=/bodyset/femur_l translation=(0 0 0)
      SpatialTransform: axes_held_at_zero=(translation1 translation2 translation3)
        TransformAxis rotation1: coordinates=hip_flexion_l axis=(0 0 1) LinearFunction(coefficients=1 0)
        TransformAxis rotation2: coordinates=hip_adduction_l axis=(1 0 0) LinearFunction(coefficients=1 0)
        TransformAxis rotation3: coordinates=hip_rotation_l axis=(0 1 0) LinearFunction(coefficients=1 0)
    CustomJoint knee_l: socket_parent_frame=femur_l_offset socket_child_frame=tibia_l_offset
      Coordinate knee_flexion_l: default_value=-1.609381e-11 range=(-2.094395 0.1745329) clamped=false
      Coordinate knee_abduction_l: default_value=0 range=(-0.1745329 0.1745329) clamped=false
      Coordinate knee_rotation_l: default_value=0 range=(-0.1745329 0.1745329) clamped=false
      PhysicalOffsetFrame femur_l_offset: socket_parent=/bodyset/femur_l translation=(0.007 -0.396 0)
      PhysicalOffsetFrame tibia_l_offset: socket_parent=/bodyset/tibia_l translation=(0 0 0)
      SpatialTransform: axes_held_at_zero=translation3
        TransformAxis rotation1: coordinates=knee_flexion_l axis=(0 0 1) LinearFunction(coefficients=1 0)
        TransformAxis rotation2: coordinates=knee_abduction_l axis=(1 0 0) LinearFunction(coefficients=1 0)
        TransformAxis rotation3: coordinates=knee_rotation_l axis=(0 1 0) LinearFunction(coefficients=1 0)
        TransformAxis translation1: coordinates=knee_flexion_l axis=(1 0 0)
          SimmSpline: x=(-2.0944 -1.74533 -1.39626 -1.0472 -0.698132 -0.349066 -0.174533 0.197344 0.337395 0.490178 1.52146 2.0944)
              y=(-0.0032 0.00179 0.00411 0.0041 0.00212 -0.001 -0.0031 -0.005227 -0.005435 -0.005574 -0.005435 -0.00525)
        TransformAxis translation2: coordinates=knee_flexion_l axis=(0 1 0)
          SimmSpline: x=(-2.0944 -1.22173 -0.523599 -0.349066 -0.174533 0.159149 2.0944)
              y=(-0.0032 0.00179 0.00411 0.0041 0.00212 -0.001 -0.0031 -0.005227 -0.005435 -0.005574 -0.005435 -0.00525)
    CustomJoint ankle_l: socket_parent_frame=tibia_l_offset socket_child_frame=talus_l_offset
      Coordinate ankle_flexion_l: default_value=0 range=(-0.5235988 0.5235988) clamped=true
      Coordinate ankle_abduction_l: default_value=0 range=(-0.1745329 0.1745329) clamped=true
      Coordinate ankle_rotation_l: default_value=0 range=(-0.1745329 0.1745329) clamped=true
      PhysicalOffsetFrame tibia_l_offset: socket_parent=/bodyset/tibia_l translation=(0 -0.425 0)
      PhysicalOffsetFrame talus_l_offset: socket_parent=/bodyset/talus_l translation=(0 0 0)
      SpatialTransform: axes_held_at_zero=(translation1 translation2 translation3)
        TransformAxis rotation1: coordinates=ankle_flexion_l axis=(0 0 1) LinearFunction(coefficients=1 0)
        TransformAxis rotation2: coordinates=ankle_abduction_l axis=(1 0 0) LinearFunction(coefficients=1 0)
        TransformAxis rotation3: coordinates=ankle_rotation_l axis=(0 1 0) LinearFunction(coefficients=1 0)
    CustomJoint subtalar_l: socket_parent_frame=talus_l_offset socket_child_frame=calcn_l_offset
      Coordinate subtalar_angle_l: default_value=0 range=(-0.17453 0.3490659) clamped=true
      PhysicalOffsetFrame talus_l_offset: socket_parent=/bodyset/talus_l translation=(-0.005 -0.04 0.003)
          orientation=(-0.043 0.0872 0)
      PhysicalOffsetFrame calcn_l_offset: socket_parent=/bodyset/calcn_l translation=(0 0 0)
      SpatialTransform: axes_held_at_zero=(rotation2 rotation3 translation1 translation2 translation3)
        TransformAxis rotation1: coordinates=subtalar_angle_l axis=(-0.7357 -0.6157 -0.2824)
            LinearFunction(coefficients=1 0)
    CustomJoint tnc_l: socket_parent_frame=calcn_l_offset socket_child_frame=midfoot_l_offset
      Coordinate tnc_angle_l: default_value=0 range=(-0.2618 0.2618) clamped=true locked=true
      PhysicalOffsetFrame calcn_l_offset: socket_parent=/bodyset/calcn_l translation=(0.04 0.015 0)
      PhysicalOffsetFrame midfoot_l_offset: socket_parent=/bodyset/midfoot_l translation=(0 0 0)
      SpatialTransform: axes_held_at_zero=(rotation2 rotation3 translation1 translation2 translation3)
        TransformAxis rotation1: coordinates=tnc_angle_l axis=(-0.6901 -0.6143 -0.3826)
            LinearFunction(coefficients=1 0)
    CustomJoint cmj_l: socket_parent_frame=midfoot_l_offset socket_child_frame=forefoot_l_offset
      Coordinate cmj_angle_l: default_value=0 range=(-0.0873 0.0873) clamped=true locked=true
      PhysicalOffsetFrame midfoot_l_offset: socket_parent=/bodyset/midfoot_l
          translation=(0.034763 0.00244041 0.000238465)
      PhysicalOffsetFrame forefoot_l_offset: socket_parent=/bodyset/forefoot_l translation=(0 0 0)
      SpatialTransform: axes_held_at_zero=(rotation2 rotation3 translation1 translation2 translation3)
        TransformAxis rotation1: coordinates=cmj_angle_l axis=(0.3368 0.1736 0.9254) LinearFunction(coefficients=1 0)
    CustomJoint toe_l: socket_parent_frame=forefoot_l_offset socket_child_frame=toes_l_offset
      Coordinate mtp_angle_l: default_value=0 range=(-0.5235988 0.5235988) clamped=true locked=true
      PhysicalOffsetFrame forefoot_l_offset: socket_parent=/bodyset/forefoot_l translation=(0.07 -0.025 0.005)
      PhysicalOffsetFrame toes_l_offset: socket_parent=/bodyset/toes_l translation=(0 0 0)
      SpatialTransform: axes_held_at_zero=(rotation2 rotation3 translation1 translation2 translation3)
        TransformAxis rotation1: coordinates=mtp_angle_l axis=(-0.3741 0.0523 -0.9259) LinearFunction(coefficients=1 0)
  ForceSet:
    Millard2012EquilibriumMuscle [values shared by the 72 below unless stated]: min_control=0.01 optimal_force=1
        max_contraction_velocity=10 fiber_damping=0.1 default_activation=0.02 default_fiber_length=0.06
        activation_time_constant=0.01 [seconds] deactivation_time_constant=0.04 [seconds] minimum_activation=0.01
      ActiveForceLengthCurve: min_norm_active_fiber_length=0.4441 transition_norm_fiber_length=0.6259
          max_norm_active_fiber_length=1.8123 shallow_ascending_slope=0.8616 minimum_value=0
      ForceVelocityCurve: concentric_slope_at_vmax=0 concentric_slope_near_vmax=0.25 isometric_slope=5
          eccentric_slope_at_vmax=0 eccentric_slope_near_vmax=0.15 max_eccentric_velocity_force_multiplier=1.4
      FiberForceLengthCurve: strain_at_zero_force=0 strain_at_one_norm_force=0.6 stiffness_at_low_force=1
          stiffness_at_one_norm_force=6 curviness=0.75
      TendonForceLengthCurve: strain_at_one_norm_force=0.059 stiffness_at_one_norm_force=25 norm_force_at_toe_end=0.2
          curviness=0.5
    Millard2012EquilibriumMuscle glut_med1_r: max_isometric_force=819 optimal_fiber_length=0.0535
        tendon_slack_length=0.078 pennation_angle_at_optimal=0.1396263 [radians]
      PathPoint P1: pelvis (-0.0408 0.0304 0.1209)
      PathPoint P2: femur_r (-0.0218 -0.0117 0.0555)
    Millard2012EquilibriumMuscle glut_med2_r: max_isometric_force=573 optimal_fiber_length=0.0845
        tendon_slack_length=0.053 pennation_angle_at_optimal=0
      PathPoint P1: pelvis (-0.0855 0.0445 0.0766)
      PathPoint P2: femur_r (-0.0258 -0.0058 0.0527)
    Millard2012EquilibriumMuscle glut_med3_r: max_isometric_force=653 optimal_fiber_length=0.0646
        tendon_slack_length=0.053 pennation_angle_at_optimal=0.3316126
      PathPoint P1: pelvis (-0.1223 0.0105 0.0648)
      PathPoint P2: femur_r (-0.0309 -0.0047 0.0518)
    Millard2012EquilibriumMuscle glut_min1_r: max_isometric_force=270 optimal_fiber_length=0.068
        tendon_slack_length=0.016 pennation_angle_at_optimal=0.1745329
      PathPoint P1: pelvis (-0.0467 -0.008 0.1056)
      PathPoint P2: femur_r (-0.0072 -0.0104 0.056)
    Millard2012EquilibriumMuscle glut_min2_r: max_isometric_force=285 optimal_fiber_length=0.056
        tendon_slack_length=0.026 pennation_angle_at_optimal=0
      PathPoint P1: pelvis (-0.0633 -0.0065 0.0991)
      PathPoint P2: femur_r (-0.0096 -0.0104 0.056)
    Millard2012EquilibriumMuscle glut_min3_r: max_isometric_force=323 optimal_fiber_length=0.038
        tendon_slack_length=0.051 pennation_angle_at_optimal=0.01745329
      PathPoint P1: pelvis (-0.0834 -0.0063 0.0856)
      PathPoint P2: femur_r (-0.0135 -0.0083 0.055)
    Millard2012EquilibriumMuscle semimem_r: max_isometric_force=1288 optimal_fiber_length=0.08
        tendon_slack_length=0.359 pennation_angle_at_optimal=0.2617994
      PathPoint P1: pelvis (-0.1192 -0.09747 0.07151)
      ConditionalPathPoint P2: tibia_r (-0.0348 -0.03519 -0.01891) socket_coordinate=/jointset/knee_r/knee_flexion_r
          range=(-0.558505 0.174533) [radians]
      PathPoint P3: tibia_r (-0.027 -0.04771 -0.01957)
    Millard2012EquilibriumMuscle semiten_r: max_isometric_force=410 optimal_fiber_length=0.201
        tendon_slack_length=0.2555 pennation_angle_at_optimal=0.08726646
      PathPoint P1: pelvis (-0.12635 -0.10988 0.06039)
      ConditionalPathPoint P2: tibia_r (-0.04203 -0.02859 -0.02277) socket_coordinate=/jointset/knee_r/knee_flexion_r
          range=(-0.331613 0.174533)
      PathPoint P3: tibia_r (-0.03322 -0.05282 -0.02288)
      PathPoint P4: tibia_r (-0.0113 -0.0746 -0.0245)
      PathPoint P5: tibia_r (0.0027 -0.0956 -0.0193)
    Millard2012EquilibriumMuscle bifemlh_r: max_isometric_force=896 optimal_fiber_length=0.109
        tendon_slack_length=0.326 pennation_angle_at_optimal=0
      PathPoint P1: pelvis (-0.12596 -0.10257 0.06944)
      PathPoint P2: tibia_r (-0.0301 -0.036 0.02943)
      PathPoint P3: tibia_r (-0.0234 -0.0563 0.0343)
    Millard2012EquilibriumMuscle bifemsh_r: max_isometric_force=804 optimal_fiber_length=0.173
        tendon_slack_length=0.089 pennation_angle_at_optimal=0.4014257
      PathPoint P1: femur_r (0.005 -0.2111 0.0234)
      PathPoint P2: tibia_r (-0.0301 -0.036 0.02943)
      PathPoint P3: tibia_r (-0.0234 -0.0563 0.0343)
    Millard2012EquilibriumMuscle sar_r: max_isometric_force=156 optimal_fiber_length=0.52 tendon_slack_length=0.1
        pennation_angle_at_optimal=0
      PathPoint P1: pelvis (-0.0153 -0.0013 0.1242)
      PathPoint P2: femur_r (-0.003 -0.3568 -0.0421)
      PathPoint P3: tibia_r (-0.0056 -0.0419 -0.0399)
      PathPoint P4: tibia_r (0.006 -0.0589 -0.0383)
      PathPoint P5: tibia_r (0.0243 -0.084 -0.0252)
    Millard2012EquilibriumMuscle add_long_r: max_isometric_force=627 optimal_fiber_length=0.138
        tendon_slack_length=0.11 pennation_angle_at_optimal=0.1047198
      PathPoint P1: pelvis (-0.0316 -0.0836 0.0169)
      PathPoint P2: femur_r (0.005 -0.2111 0.0234)
    Millard2012EquilibriumMuscle add_brev_r: max_isometric_force=429 optimal_fiber_length=0.133
        tendon_slack_length=0.02 pennation_angle_at_optimal=0
      PathPoint P1: pelvis (-0.0587 -0.0915 0.0164)
      PathPoint P2: femur_r (0.0009 -0.1196 0.0294)
    Millard2012EquilibriumMuscle add_mag1_r: max_isometric_force=381 optimal_fiber_length=0.087
        tendon_slack_length=0.06 pennation_angle_at_optimal=0.08726646
      PathPoint P1: pelvis (-0.0732 -0.1174 0.0255)
      PathPoint P2: femur_r (-0.0045 -0.1211 0.0339)
    Millard2012EquilibriumMuscle add_mag2_r: max_isometric_force=343 optimal_fiber_length=0.121
        tendon_slack_length=0.12 pennation_angle_at_optimal=0.05235988
      PathPoint P1: pelvis (-0.0831 -0.1192 0.0308)
      PathPoint P2: femur_r (0.0054 -0.2285 0.0227)
    Millard2012EquilibriumMuscle add_mag3_r: max_isometric_force=488 optimal_fiber_length=0.131
        tendon_slack_length=0.249 pennation_angle_at_optimal=0.08726646
      PathPoint P1: pelvis (-0.11108 -0.11413 0.04882)
      PathPoint P2: femur_r (0.007 -0.3837 -0.0266)
    Millard2012EquilibriumMuscle tfl_r: max_isometric_force=233 optimal_fiber_length=0.095 tendon_slack_length=0.425
        pennation_angle_at_optimal=0.05235988
      PathPoint P1: pelvis (-0.0311 0.0214 0.1241)
      PathPoint P2: femur_r (0.0294 -0.0995 0.0597)
      PathPoint P3: femur_r (0.0054 -0.4049 0.0357)
      PathPoint P4: tibia_r (0.006 -0.0487 0.0297)
    Millard2012EquilibriumMuscle pect_r: max_isometric_force=266 optimal_fiber_length=0.1 tendon_slack_length=0.033
        pennation_angle_at_optimal=0
      PathPoint P1: pelvis (-0.0431 -0.0768 0.0451)
      PathPoint P2: femur_r (-0.0122 -0.0822 0.0253)
    Millard2012EquilibriumMuscle grac_r: max_isometric_force=162 optimal_fiber_length=0.352 tendon_slack_length=0.126
        pennation_angle_at_optimal=0.05235988
      PathPoint P1: pelvis (-0.07401 -0.1187 0.02794)
      ConditionalPathPoint P2: tibia_r (-0.02657 -0.0319 -0.03774) socket_coordinate=/jointset/knee_r/knee_flexion_r
          range=(-0.436332 0.174533)
      PathPoint P3: tibia_r (-0.01943 -0.05153 -0.0358)
      PathPoint P4: tibia_r (0.006 -0.0836 -0.0228)
    Millard2012EquilibriumMuscle glut_max1_r: max_isometric_force=573 optimal_fiber_length=0.142
        tendon_slack_length=0.125 pennation_angle_at_optimal=0.08726646
      PathPoint P1: pelvis (-0.1195 0.0612 0.07)
      PathPoint P2: pelvis (-0.1291 0.0012 0.0886)
      PathPoint P3: femur_r (-0.0457 -0.0248 0.0392)
      PathPoint P4: femur_r (-0.0277 -0.0566 0.047)
    Millard2012EquilibriumMuscle glut_max2_r: max_isometric_force=819 optimal_fiber_length=0.147
        tendon_slack_length=0.127 pennation_angle_at_optimal=0
      PathPoint P1: pelvis (-0.1349 0.0176 0.0563)
      PathPoint P2: pelvis (-0.1376 -0.052 0.0914)
      PathPoint P3: femur_r (-0.0426 -0.053 0.0293)
      PathPoint P4: femur_r (-0.0156 -0.1016 0.0419)
    Millard2012EquilibriumMuscle glut_max3_r: max_isometric_force=552 optimal_fiber_length=0.144
        tendon_slack_length=0.145 pennation_angle_at_optimal=0.08726646
      PathPoint P1: pelvis (-0.1556 -0.0314 0.0058)
      PathPoint P2: pelvis (-0.1529 -0.1052 0.0403)
      PathPoint P3: femur_r (-0.0299 -0.1041 0.0135)
      PathPoint P4: femur_r (-0.006 -0.1419 0.0411)
    Millard2012EquilibriumMuscle iliacus_r: max_isometric_force=1073 optimal_fiber_length=0.1 tendon_slack_length=0.1
        pennation_angle_at_optimal=0.1221731
      PathPoint P1: pelvis (-0.0674 0.0365 0.0854)
      PathPoint P2: pelvis (-0.0258 -0.055 0.0811)
      ConditionalPathPoint P3: pelvis (-0.0288 -0.0805 0.0816) socket_coordinate=/jointset/hip_r/hip_flexion_r
          range=(-1.5708 0.785398)
      PathPoint P4: femur_r (0.0017 -0.0543 0.0057)
      PathPoint P5: femur_r (-0.0193 -0.0621 0.0129)
    Millard2012EquilibriumMuscle psoas_r: max_isometric_force=1113 optimal_fiber_length=0.1 tendon_slack_length=0.16
        pennation_angle_at_optimal=0.1396263
      PathPoint P1: pelvis (-0.0647 0.0887 0.0289)
      PathPoint P2: pelvis (-0.0238 -0.057 0.0759)
      ConditionalPathPoint P3: pelvis (-0.0288 -0.0805 0.0816) socket_coordinate=/jointset/hip_r/hip_flexion_r
          range=(-1.5708 0.785398)
      PathPoint P4: femur_r (0.0016 -0.0507 0.0038)
      PathPoint P5: femur_r (-0.0188 -0.0597 0.0104)
    Millard2012EquilibriumMuscle quad_fem_r: max_isometric_force=381 optimal_fiber_length=0.054
        tendon_slack_length=0.024 pennation_angle_at_optimal=0
      PathPoint P1: pelvis (-0.1143 -0.1151 0.052)
      PathPoint P2: femur_r (-0.0381 -0.0359 0.0366)
    Millard2012EquilibriumMuscle gem_r: max_isometric_force=164 optimal_fiber_length=0.024 tendon_slack_length=0.039
        pennation_angle_at_optimal=0
      PathPoint P1: pelvis (-0.1133 -0.082 0.0714)
      PathPoint P2: femur_r (-0.0142 -0.0033 0.0443)
    Millard2012EquilibriumMuscle peri_r: max_isometric_force=444 optimal_fiber_length=0.026 tendon_slack_length=0.115
        pennation_angle_at_optimal=0.1745329
      PathPoint P1: pelvis (-0.1396 0.0003 0.0235)
      PathPoint P2: pelvis (-0.1193 -0.0276 0.0657)
      PathPoint P3: femur_r (-0.0148 -0.0036 0.0437)
    Millard2012EquilibriumMuscle rect_fem_r: max_isometric_force=1169 optimal_fiber_length=0.114
        tendon_slack_length=0.31 pennation_angle_at_optimal=0.08726646
      PathPoint P1: pelvis (-0.0246838 -0.0294477 0.0916572)
      ConditionalPathPoint P2: femur_r (0.032845 -0.396303 0.00186843)
          socket_coordinate=/jointset/knee_r/knee_flexion_r range=(-2.61799 -1.45997)
      MovingPathPoint P3: tibia_r socket_x_coordinate=/jointset/knee_r/knee_flexion_r
          socket_y_coordinate=/jointset/knee_r/knee_flexion_r socket_z_coordinate=/jointset/knee_r/knee_flexion_r
        x_location: MultiplierFunction: scale=0.9611719
          SimmSpline: x=(-2.0944 -1.99997 -1.5708 -1.45752 -1.39626 -1.0472 -0.698132 -0.526391 -0.349066 -0.174533 0 0.00017453 0.00034907 0.0279253 0.0872665 0.174533 2.0944)
              y=(0.0155805 0.0179938 0.0275081 0.0296564 0.0307615 0.0365695 0.0422074 0.0450902 0.048391 0.0534299 0.0617576 0.0617669 0.0617762 0.0633083 0.066994 0.0733035 0.0573481)
        y_location: MultiplierFunction: scale=0.9611719
          SimmSpline: x=(-2.0944 -1.99997 -1.5708 -1.45752 -1.39626 -1.0472 -0.698132 -0.526391 -0.349066 -0.174533 0 0.00017453 0.00034907 0.0279253 0.0872665 0.174533 2.0944)
              y=(0.0234116 0.0237613 0.0251141 0.0252795 0.0253146 0.0249184 0.0242373 0.0238447 0.0234197 0.0227644 0.020984 0.0209814 0.0209788 0.0205225 0.0191754 0.0159554 -0.0673774)
        z_location: MultiplierFunction: scale=0.9611719
          SimmSpline: x=(-2.0944 0.1745) y=(0.0014 0.0014)
    Millard2012EquilibriumMuscle vas_med_r: max_isometric_force=1294 optimal_fiber_length=0.089
        tendon_slack_length=0.126 pennation_angle_at_optimal=0.08726646
      PathPoint P1: femur_r (0.0137674 -0.206412 0.0184876)
      PathPoint P2: femur_r (0.0350084 -0.272299 0.000885044)
      ConditionalPathPoint P3: femur_r (0.0363851 -0.398073 -0.0122923)
          socket_coordinate=/jointset/knee_r/knee_flexion_r range=(-2.61799 -1.21004)
      ConditionalPathPoint P4: femur_r (0.0269447 -0.418429 -0.0128823)
          socket_coordinate=/jointset/knee_r/knee_flexion_r range=(-2.61799 -1.78006)
      MovingPathPoint P5: tibia_r socket_x_coordinate=/jointset/knee_r/knee_flexion_r
          socket_y_coordinate=/jointset/knee_r/knee_flexion_r socket_z_coordinate=/jointset/knee_r/knee_flexion_r
        x_location: MultiplierFunction: scale=0.9611719
          SimmSpline: x=(-2.0944 -1.99997 -1.5708 -1.45752 -1.39626 -1.0472 -0.698132 -0.526391 -0.349066 -0.174533 0 0.00017453 0.00034907 0.0279253 0.0872665 0.174533 2.0944)
              y=(0.00981097 0.0122243 0.0217371 0.0238851 0.0249902 0.0307959 0.0364187 0.0392871 0.0425654 0.0475764 0.0559586 0.0559681 0.0559776 0.0575419 0.0613368 0.0679503 0.0629332)
        y_location: MultiplierFunction: scale=0.9611719
          SimmSpline: x=(-2.0944 -1.99997 -1.5708 -1.45752 -1.39626 -1.0472 -0.698132 -0.526391 -0.349066 -0.174533 0 0.00017453 0.00034907 0.0279253 0.0872665 0.174533 2.0944)
              y=(0.0224154 0.0227651 0.0241265 0.0242933 0.0243287 0.0239462 0.0233593 0.0230677 0.0228342 0.0226362 0.0217917 0.0217903 0.0217889 0.0215365 0.0206842 0.0183269 -0.0656205)
        z_location: MultiplierFunction: scale=0.9611719
          SimmSpline: x=(-2.0944 2.0944) y=(-0.0146 -0.0146)
    Millard2012EquilibriumMuscle vas_int_r: max_isometric_force=1365 optimal_fiber_length=0.087
        tendon_slack_length=0.136 pennation_angle_at_optimal=0.05235988
      PathPoint P1: femur_r (0.0285181 -0.189203 0.0304848)
      PathPoint P2: femur_r (0.0329433 -0.204937 0.0280264)
      ConditionalPathPoint P3: femur_r (0.03373 -0.396303 0.0054086) socket_coordinate=/jointset/knee_r/knee_flexion_r
          range=(-2.61799 -1.42)
      MovingPathPoint P4: tibia_r socket_x_coordinate=/jointset/knee_r/knee_flexion_r
          socket_y_coordinate=/jointset/knee_r/knee_flexion_r socket_z_coordinate=/jointset/knee_r/knee_flexion_r
        x_location: MultiplierFunction: scale=0.9611719
          SimmSpline: x=(-2.0944 -1.99997 -1.5708 -1.45752 -1.39626 -1.0472 -0.698132 -0.526391 -0.349066 -0.174533 0 0.00017453 0.00034907 0.0279253 0.0872665 0.174533 2.0944)
              y=(0.0082733 0.0106866 0.0202042 0.022353 0.0234583 0.0292715 0.0349465 0.037871 0.0412569 0.0465287 0.0554632 0.0554735 0.0554837 0.0571717 0.061272 0.0684368 0.0648818)
        y_location: MultiplierFunction: scale=0.9611719
          SimmSpline: x=(-2.0944 -1.99997 -1.5708 -1.45752 -1.39626 -1.0472 -0.698132 -0.526391 -0.349066 -0.174533 0 0.00017453 0.00034907 0.0279253 0.0872665 0.174533 2.0944)
              y=(0.025599 0.0259487 0.0273124 0.0274796 0.0275151 0.0271363 0.0265737 0.0263073 0.0261187 0.0260129 0.0252923 0.0252911 0.0252898 0.0250526 0.0242191 0.0218288 -0.0685706)
        z_location: MultiplierFunction: scale=0.9611719
          SimmSpline: x=(-2.0944 2.0944) y=(0.0018 0.0018)
    Millard2012EquilibriumMuscle vas_lat_r: max_isometric_force=1871 optimal_fiber_length=0.084
        tendon_slack_length=0.157 pennation_angle_at_optimal=0.08726646
      PathPoint P1: femur_r (0.00472023 -0.182319 0.03432)
      PathPoint P2: femur_r (0.026453 -0.254794 0.0402203)
      ConditionalPathPoint P3: femur_r (0.0355001 -0.396303 0.0201593)
          socket_coordinate=/jointset/knee_r/knee_flexion_r range=(-2.61799 -1.21004)
      ConditionalPathPoint P4: femur_r (0.0248796 -0.417249 0.0180942)
          socket_coordinate=/jointset/knee_r/knee_flexion_r range=(-2.61799 -1.92004)
      MovingPathPoint P5: tibia_r socket_x_coordinate=/jointset/knee_r/knee_flexion_r
          socket_y_coordinate=/jointset/knee_r/knee_flexion_r socket_z_coordinate=/jointset/knee_r/knee_flexion_r
        x_location: MultiplierFunction: scale=0.9611719
          SimmSpline: x=(-2.0944 -1.99997 -1.5708 -1.45752 -1.39626 -1.0472 -0.698132 -0.526391 -0.349066 -0.174533 0 0.00017453 0.00034907 0.0279253 0.0872665 0.174533 2.0944)
              y=(0.0142897 0.016703 0.0262145 0.0283623 0.0294674 0.0352709 0.0408785 0.0437291 0.0469704 0.0518742 0.0599557 0.0599647 0.0599738 0.0614577 0.0650351 0.0711867 0.0583766)
        y_location: MultiplierFunction: scale=0.9611719
          SimmSpline: x=(-2.0944 -1.99997 -1.5708 -1.45752 -1.39626 -1.0472 -0.698132 -0.526391 -0.349066 -0.174533 0 0.00017453 0.00034907 0.0279253 0.0872665 0.174533 2.0944)
              y=(0.0215318 0.0218815 0.0232362 0.0234019 0.0234371 0.0230439 0.0223842 0.0220151 0.0216359 0.0210971 0.0195864 0.0195842 0.019582 0.01919 0.018008 0.0151073 -0.0653421)
        z_location: MultiplierFunction: scale=0.9611719
          SimmSpline: x=(-2.0944 2.0944) y=(0.0165 0.0165)
    Millard2012EquilibriumMuscle med_gas_r: max_isometric_force=1558 optimal_fiber_length=0.06 tendon_slack_length=0.39
        pennation_angle_at_optimal=0.296706
      PathPoint P1: femur_r (-0.019 -0.3929 -0.0235)
      PathPoint P2: femur_r (-0.035 -0.412 -0.026)
      PathPoint P3: calcn_r (-0.037 0.009 0.002)
    Millard2012EquilibriumMuscle lat_gas_r: max_isometric_force=683 optimal_fiber_length=0.064 tendon_slack_length=0.38
        pennation_angle_at_optimal=0.1396263
      PathPoint P1: femur_r (-0.022 -0.3946 0.0272)
      PathPoint P2: femur_r (-0.035 -0.412 0.027)
      PathPoint P3: calcn_r (-0.037 0.009 0.002)
    Millard2012EquilibriumMuscle soleus_r: max_isometric_force=3549 optimal_fiber_length=0.05 tendon_slack_length=0.25
        pennation_angle_at_optimal=0.4363323
      PathPoint P1: tibia_r (-0.0024 -0.1533 0.0071)
      PathPoint P2: calcn_r (-0.037 0.009 0.002)
    Millard2012EquilibriumMuscle tib_post_r: max_isometric_force=1588 optimal_fiber_length=0.031
        tendon_slack_length=0.31 pennation_angle_at_optimal=0.2094395
      PathPoint P1: tibia_r (-0.0094 -0.1348 0.0019)
      PathPoint P2: tibia_r (-0.0144 -0.4051 -0.0229)
      PathPoint P3: talus_r (-0.00707004 -0.0135503 -0.02068)
      PathPoint P4: midfoot_r (0.00525116 -0.00614186 -0.0182003)
    Millard2012EquilibriumMuscle tib_ant_r: max_isometric_force=905 optimal_fiber_length=0.058
        tendon_slack_length=0.263 pennation_angle_at_optimal=0.08726646
      PathPoint P1: tibia_r (0.0179 -0.1624 0.0115)
      PathPoint P2: tibia_r (0.0305443 -0.397232 -0.0186437)
      PathPoint P3: midfoot_r (0.0162519 0.0160178 -0.0283645)
      PathPoint P3_0: forefoot_r (0.00343243 -0.00334339 -0.0302683)
    Millard2012EquilibriumMuscle glut_med1_l: max_isometric_force=819 optimal_fiber_length=0.0535
        tendon_slack_length=0.078 pennation_angle_at_optimal=0.1396263
      PathPoint P1: pelvis (-0.0408 0.0304 -0.1209)
      PathPoint P2: femur_l (-0.0218 -0.0117 -0.0555)
    Millard2012EquilibriumMuscle glut_med2_l: max_isometric_force=573 optimal_fiber_length=0.0845
        tendon_slack_length=0.053 pennation_angle_at_optimal=0
      PathPoint P1: pelvis (-0.0855 0.0445 -0.0766)
      PathPoint P2: femur_l (-0.0258 -0.0058 -0.0527)
    Millard2012EquilibriumMuscle glut_med3_l: max_isometric_force=653 optimal_fiber_length=0.0646
        tendon_slack_length=0.053 pennation_angle_at_optimal=0.3316126
      PathPoint P1: pelvis (-0.1223 0.0105 -0.0648)
      PathPoint P2: femur_l (-0.0309 -0.0047 -0.0518)
    Millard2012EquilibriumMuscle glut_min1_l: max_isometric_force=270 optimal_fiber_length=0.068
        tendon_slack_length=0.016 pennation_angle_at_optimal=0.1745329
      PathPoint P1: pelvis (-0.0467 -0.008 -0.1056)
      PathPoint P2: femur_l (-0.0072 -0.0104 -0.056)
    Millard2012EquilibriumMuscle glut_min2_l: max_isometric_force=285 optimal_fiber_length=0.056
        tendon_slack_length=0.026 pennation_angle_at_optimal=0
      PathPoint P1: pelvis (-0.0633 -0.0065 -0.0991)
      PathPoint P2: femur_l (-0.0096 -0.0104 -0.056)
    Millard2012EquilibriumMuscle glut_min3_l: max_isometric_force=323 optimal_fiber_length=0.038
        tendon_slack_length=0.051 pennation_angle_at_optimal=0.01745329
      PathPoint P1: pelvis (-0.0834 -0.0063 -0.0856)
      PathPoint P2: femur_l (-0.0135 -0.0083 -0.055)
    Millard2012EquilibriumMuscle semimem_l: max_isometric_force=1288 optimal_fiber_length=0.08
        tendon_slack_length=0.359 pennation_angle_at_optimal=0.2617994
      PathPoint P1: pelvis (-0.1192 -0.09747 -0.07151)
      ConditionalPathPoint P2: tibia_l (-0.0348 -0.03519 0.01891) socket_coordinate=/jointset/knee_l/knee_flexion_l
          range=(-0.558505 0.174533)
      PathPoint P3: tibia_l (-0.027 -0.04771 0.01957)
    Millard2012EquilibriumMuscle semiten_l: max_isometric_force=410 optimal_fiber_length=0.201
        tendon_slack_length=0.2555 pennation_angle_at_optimal=0.08726646
      PathPoint P1: pelvis (-0.12635 -0.10988 -0.06039)
      ConditionalPathPoint P2: tibia_l (-0.04203 -0.02859 0.02277) socket_coordinate=/jointset/knee_l/knee_flexion_l
          range=(-0.331613 0.174533)
      PathPoint P3: tibia_l (-0.03322 -0.05282 0.02288)
      PathPoint P4: tibia_l (-0.0113 -0.0746 0.0245)
      PathPoint P5: tibia_l (0.0027 -0.0956 0.0193)
    Millard2012EquilibriumMuscle bifemlh_l: max_isometric_force=896 optimal_fiber_length=0.109
        tendon_slack_length=0.326 pennation_angle_at_optimal=0
      PathPoint P1: pelvis (-0.12596 -0.10257 -0.06944)
      PathPoint P2: tibia_l (-0.0301 -0.036 -0.02943)
      PathPoint P3: tibia_l (-0.0234 -0.0563 -0.0343)
    Millard2012EquilibriumMuscle bifemsh_l: max_isometric_force=804 optimal_fiber_length=0.173
        tendon_slack_length=0.089 pennation_angle_at_optimal=0.4014257
      PathPoint P1: femur_l (0.005 -0.2111 -0.0234)
      PathPoint P2: tibia_l (-0.0301 -0.036 -0.02943)
      PathPoint P3: tibia_l (-0.0234 -0.0563 -0.0343)
    Millard2012EquilibriumMuscle sar_l: max_isometric_force=156 optimal_fiber_length=0.52 tendon_slack_length=0.1
        pennation_angle_at_optimal=0
      PathPoint P1: pelvis (-0.0153 -0.0013 -0.1242)
      PathPoint P2: femur_l (-0.003 -0.3568 0.0421)
      PathPoint P3: tibia_l (-0.0056 -0.0419 0.0399)
      PathPoint P4: tibia_l (0.006 -0.0589 0.0383)
      PathPoint P5: tibia_l (0.0243 -0.084 0.0252)
    Millard2012EquilibriumMuscle add_long_l: max_isometric_force=627 optimal_fiber_length=0.138
        tendon_slack_length=0.11 pennation_angle_at_optimal=0.1047198
      PathPoint P1: pelvis (-0.0316 -0.0836 -0.0169)
      PathPoint P2: femur_l (0.005 -0.2111 -0.0234)
    Millard2012EquilibriumMuscle add_brev_l: max_isometric_force=429 optimal_fiber_length=0.133
        tendon_slack_length=0.02 pennation_angle_at_optimal=0
      PathPoint P1: pelvis (-0.0587 -0.0915 -0.0164)
      PathPoint P2: femur_l (0.0009 -0.1196 -0.0294)
    Millard2012EquilibriumMuscle add_mag1_l: max_isometric_force=381 optimal_fiber_length=0.087
        tendon_slack_length=0.06 pennation_angle_at_optimal=0.08726646
      PathPoint P1: pelvis (-0.0732 -0.1174 -0.0255)
      PathPoint P2: femur_l (-0.0045 -0.1211 -0.0339)
    Millard2012EquilibriumMuscle add_mag2_l: max_isometric_force=343 optimal_fiber_length=0.121
        tendon_slack_length=0.12 pennation_angle_at_optimal=0.05235988
      PathPoint P1: pelvis (-0.0831 -0.1192 -0.0308)
      PathPoint P2: femur_l (0.0054 -0.2285 -0.0227)
    Millard2012EquilibriumMuscle add_mag3_l: max_isometric_force=488 optimal_fiber_length=0.131
        tendon_slack_length=0.249 pennation_angle_at_optimal=0.08726646
      PathPoint P1: pelvis (-0.11108 -0.11413 -0.04882)
      PathPoint P2: femur_l (0.007 -0.3837 0.0266)
    Millard2012EquilibriumMuscle tfl_l: max_isometric_force=233 optimal_fiber_length=0.095 tendon_slack_length=0.425
        pennation_angle_at_optimal=0.05235988
      PathPoint P1: pelvis (-0.0311 0.0214 -0.1241)
      PathPoint P2: femur_l (0.0294 -0.0995 -0.0597)
      PathPoint P3: femur_l (0.0054 -0.4049 -0.0357)
      PathPoint P4: tibia_l (0.006 -0.0487 -0.0297)
    Millard2012EquilibriumMuscle pect_l: max_isometric_force=266 optimal_fiber_length=0.1 tendon_slack_length=0.033
        pennation_angle_at_optimal=0
      PathPoint P1: pelvis (-0.0431 -0.0768 -0.0451)
      PathPoint P2: femur_l (-0.0122 -0.0822 -0.0253)
    Millard2012EquilibriumMuscle grac_l: max_isometric_force=162 optimal_fiber_length=0.352 tendon_slack_length=0.126
        pennation_angle_at_optimal=0.05235988
      PathPoint P1: pelvis (-0.07401 -0.1187 -0.02794)
      ConditionalPathPoint P2: tibia_l (-0.02657 -0.0319 0.03774) socket_coordinate=/jointset/knee_l/knee_flexion_l
          range=(-0.436332 0.174533)
      PathPoint P3: tibia_l (-0.01943 -0.05153 0.0358)
      PathPoint P4: tibia_l (0.006 -0.0836 0.0228)
    Millard2012EquilibriumMuscle glut_max1_l: max_isometric_force=573 optimal_fiber_length=0.142
        tendon_slack_length=0.125 pennation_angle_at_optimal=0.08726646
      PathPoint P1: pelvis (-0.1195 0.0612 -0.07)
      PathPoint P2: pelvis (-0.1291 0.0012 -0.0886)
      PathPoint P3: femur_l (-0.0457 -0.0248 -0.0392)
      PathPoint P4: femur_l (-0.0277 -0.0566 -0.047)
    Millard2012EquilibriumMuscle glut_max2_l: max_isometric_force=819 optimal_fiber_length=0.147
        tendon_slack_length=0.127 pennation_angle_at_optimal=0
      PathPoint P1: pelvis (-0.1349 0.0176 -0.0563)
      PathPoint P2: pelvis (-0.1376 -0.052 -0.0914)
      PathPoint P3: femur_l (-0.0426 -0.053 -0.0293)
      PathPoint P4: femur_l (-0.0156 -0.1016 -0.0419)
    Millard2012EquilibriumMuscle glut_max3_l: max_isometric_force=552 optimal_fiber_length=0.144
        tendon_slack_length=0.145 pennation_angle_at_optimal=0.08726646
      PathPoint P1: pelvis (-0.1556 -0.0314 -0.0058)
      PathPoint P2: pelvis (-0.1529 -0.1052 -0.0403)
      PathPoint P3: femur_l (-0.0299 -0.1041 -0.0135)
      PathPoint P4: femur_l (-0.006 -0.1419 -0.0411)
    Millard2012EquilibriumMuscle iliacus_l: max_isometric_force=1073 optimal_fiber_length=0.1 tendon_slack_length=0.1
        pennation_angle_at_optimal=0.1221731
      PathPoint P1: pelvis (-0.0674 0.0365 -0.0854)
      PathPoint P2: pelvis (-0.0258 -0.055 -0.0811)
      ConditionalPathPoint P3: pelvis (-0.0288 -0.0805 -0.0816) socket_coordinate=/jointset/hip_l/hip_flexion_l
          range=(-1.5708 0.785398)
      PathPoint P4: femur_l (0.0017 -0.0543 -0.0057)
      PathPoint P5: femur_l (-0.0193 -0.0621 -0.0129)
    Millard2012EquilibriumMuscle psoas_l: max_isometric_force=1113 optimal_fiber_length=0.1 tendon_slack_length=0.16
        pennation_angle_at_optimal=0.1396263
      PathPoint P1: pelvis (-0.0647 0.0887 -0.0289)
      PathPoint P2: pelvis (-0.0238 -0.057 -0.0759)
      ConditionalPathPoint P3: pelvis (-0.0288 -0.0805 -0.0816) socket_coordinate=/jointset/hip_l/hip_flexion_l
          range=(-1.5708 0.785398)
      PathPoint P4: femur_l (0.0016 -0.0507 -0.0038)
      PathPoint P5: femur_l (-0.0188 -0.0597 -0.0104)
    Millard2012EquilibriumMuscle quad_fem_l: max_isometric_force=381 optimal_fiber_length=0.054
        tendon_slack_length=0.024 pennation_angle_at_optimal=0
      PathPoint P1: pelvis (-0.1143 -0.1151 -0.052)
      PathPoint P2: femur_l (-0.0381 -0.0359 -0.0366)
    Millard2012EquilibriumMuscle gem_l: max_isometric_force=164 optimal_fiber_length=0.024 tendon_slack_length=0.039
        pennation_angle_at_optimal=0
      PathPoint P1: pelvis (-0.1133 -0.082 -0.0714)
      PathPoint P2: femur_l (-0.0142 -0.0033 -0.0443)
    Millard2012EquilibriumMuscle peri_l: max_isometric_force=444 optimal_fiber_length=0.026 tendon_slack_length=0.115
        pennation_angle_at_optimal=0.1745329
      PathPoint P1: pelvis (-0.1396 0.0003 -0.0235)
      PathPoint P2: pelvis (-0.1193 -0.0276 -0.0657)
      PathPoint P3: femur_l (-0.0148 -0.0036 -0.0437)
    Millard2012EquilibriumMuscle rect_fem_l: max_isometric_force=1169 optimal_fiber_length=0.114
        tendon_slack_length=0.31 pennation_angle_at_optimal=0.08726646
      PathPoint P1: pelvis (-0.0246838 -0.0294477 -0.0916572)
      ConditionalPathPoint P2: femur_l (0.0321224 -0.387584 -0.00182732)
          socket_coordinate=/jointset/knee_l/knee_flexion_l range=(-2.61799 -1.45997)
      MovingPathPoint P3: tibia_l socket_x_coordinate=/jointset/knee_l/knee_flexion_l
          socket_y_coordinate=/jointset/knee_l/knee_flexion_l socket_z_coordinate=/jointset/knee_l/knee_flexion_l
        x_location: MultiplierFunction: scale=1.012199
          SimmSpline: x=(-2.0944 -1.99997 -1.5708 -1.45752 -1.39626 -1.0472 -0.698132 -0.526391 -0.349066 -0.174533 0 0.00017453 0.00034907 0.0279253 0.0872665 0.174533 2.0944)
              y=(0.0155805 0.0179938 0.0275081 0.0296564 0.0307615 0.0365695 0.0422074 0.0450902 0.048391 0.0534299 0.0617576 0.0617669 0.0617762 0.0633083 0.066994 0.0733035 0.0573481)
        y_location: MultiplierFunction: scale=1.012199
          SimmSpline: x=(-2.0944 -1.99997 -1.5708 -1.45752 -1.39626 -1.0472 -0.698132 -0.526391 -0.349066 -0.174533 0 0.00017453 0.00034907 0.0279253 0.0872665 0.174533 2.0944)
              y=(0.0234116 0.0237613 0.0251141 0.0252795 0.0253146 0.0249184 0.0242373 0.0238447 0.0234197 0.0227644 0.020984 0.0209814 0.0209788 0.0205225 0.0191754 0.0159554 -0.0673774)
        z_location: MultiplierFunction: scale=1.012199
          SimmSpline: x=(-2.0944 0.1745) y=(-0.0014 -0.0014)
    Millard2012EquilibriumMuscle vas_med_l: max_isometric_force=1294 optimal_fiber_length=0.089
        tendon_slack_length=0.126 pennation_angle_at_optimal=0.08726646
      PathPoint P1: femur_l (0.0134645 -0.201871 -0.0180809)
      PathPoint P2: femur_l (0.0342382 -0.266308 -0.000865573)
      ConditionalPathPoint P3: femur_l (0.0355847 -0.389316 0.0120219)
          socket_coordinate=/jointset/knee_l/knee_flexion_l range=(-2.61799 -1.21004)
      ConditionalPathPoint P4: femur_l (0.0263519 -0.409224 0.0125989)
          socket_coordinate=/jointset/knee_l/knee_flexion_l range=(-2.61799 -1.78006)
      MovingPathPoint P5: tibia_l socket_x_coordinate=/jointset/knee_l/knee_flexion_l
          socket_y_coordinate=/jointset/knee_l/knee_flexion_l socket_z_coordinate=/jointset/knee_l/knee_flexion_l
        x_location: MultiplierFunction: scale=1.012199
          SimmSpline: x=(-2.0944 -1.99997 -1.5708 -1.45752 -1.39626 -1.0472 -0.698132 -0.526391 -0.349066 -0.174533 0 0.00017453 0.00034907 0.0279253 0.0872665 0.174533 2.0944)
              y=(0.00981097 0.0122243 0.0217371 0.0238851 0.0249902 0.0307959 0.0364187 0.0392871 0.0425654 0.0475764 0.0559586 0.0559681 0.0559776 0.0575419 0.0613368 0.0679503 0.0629332)
        y_location: MultiplierFunction: scale=1.012199
          SimmSpline: x=(-2.0944 -1.99997 -1.5708 -1.45752 -1.39626 -1.0472 -0.698132 -0.526391 -0.349066 -0.174533 0 0.00017453 0.00034907 0.0279253 0.0872665 0.174533 2.0944)
              y=(0.0224154 0.0227651 0.0241265 0.0242933 0.0243287 0.0239462 0.0233593 0.0230677 0.0228342 0.0226362 0.0217917 0.0217903 0.0217889 0.0215365 0.0206842 0.0183269 -0.0656205)
        z_location: MultiplierFunction: scale=1.012199
          SimmSpline: x=(-2.0944 2.0944) y=(0.0146 0.0146)
    Millard2012EquilibriumMuscle vas_int_l: max_isometric_force=1365 optimal_fiber_length=0.087
        tendon_slack_length=0.136 pennation_angle_at_optimal=0.05235988
      PathPoint P1: femur_l (0.0278907 -0.18504 -0.0298142)
      PathPoint P2: femur_l (0.0322186 -0.200428 -0.0274098)
      ConditionalPathPoint P3: femur_l (0.032988 -0.387584 -0.00528961)
          socket_coordinate=/jointset/knee_l/knee_flexion_l range=(-2.61799 -1.42)
      MovingPathPoint P4: tibia_l socket_x_coordinate=/jointset/knee_l/knee_flexion_l
          socket_y_coordinate=/jointset/knee_l/knee_flexion_l socket_z_coordinate=/jointset/knee_l/knee_flexion_l
        x_location: MultiplierFunction: scale=1.012199
          SimmSpline: x=(-2.0944 -1.99997 -1.5708 -1.45752 -1.39626 -1.0472 -0.698132 -0.526391 -0.349066 -0.174533 0 0.00017453 0.00034907 0.0279253 0.0872665 0.174533 2.0944)
              y=(0.0155805 0.0179938 0.0275081 0.0296564 0.0307615 0.0365695 0.0422074 0.0450902 0.048391 0.0534299 0.0617576 0.0617669 0.0617762 0.0633083 0.066994 0.0733035 0.0573481)
        y_location: MultiplierFunction: scale=1.012199
          SimmSpline: x=(-2.0944 -1.99997 -1.5708 -1.45752 -1.39626 -1.0472 -0.698132 -0.526391 -0.349066 -0.174533 0 0.00017453 0.00034907 0.0279253 0.0872665 0.174533 2.0944)
              y=(0.0234116 0.0237613 0.0251141 0.0252795 0.0253146 0.0249184 0.0242373 0.0238447 0.0234197 0.0227644 0.020984 0.0209814 0.0209788 0.0205225 0.0191754 0.0159554 -0.0673774)
        z_location: MultiplierFunction: scale=1.012199
          SimmSpline: x=(-2.0944 0.1745) y=(-0.0014 -0.0014)
    Millard2012EquilibriumMuscle vas_lat_l: max_isometric_force=1871 optimal_fiber_length=0.084
        tendon_slack_length=0.157 pennation_angle_at_optimal=0.08726646
      PathPoint P1: femur_l (0.00461639 -0.178308 -0.033565)
      PathPoint P2: femur_l (0.025871 -0.249189 -0.0393355)
      ConditionalPathPoint P3: femur_l (0.0347191 -0.387584 -0.0197158)
          socket_coordinate=/jointset/knee_l/knee_flexion_l range=(-2.61799 -1.21004)
      ConditionalPathPoint P4: femur_l (0.0243322 -0.40807 -0.0176962)
          socket_coordinate=/jointset/knee_l/knee_flexion_l range=(-2.61799 -1.92004)
      MovingPathPoint P5: tibia_l socket_x_coordinate=/jointset/knee_l/knee_flexion_l
          socket_y_coordinate=/jointset/knee_l/knee_flexion_l socket_z_coordinate=/jointset/knee_l/knee_flexion_l
        x_location: MultiplierFunction: scale=1.012199
          SimmSpline: x=(-2.0944 -1.99997 -1.5708 -1.45752 -1.39626 -1.0472 -0.698132 -0.526391 -0.349066 -0.174533 0 0.00017453 0.00034907 0.0279253 0.0872665 0.174533 2.0944)
              y=(0.0142897 0.016703 0.0262145 0.0283623 0.0294674 0.0352709 0.0408785 0.0437291 0.0469704 0.0518742 0.0599557 0.0599647 0.0599738 0.0614577 0.0650351 0.0711867 0.0583766)
        y_location: MultiplierFunction: scale=1.012199
          SimmSpline: x=(-2.0944 -1.99997 -1.5708 -1.45752 -1.39626 -1.0472 -0.698132 -0.526391 -0.349066 -0.174533 0 0.00017453 0.00034907 0.0279253 0.0872665 0.174533 2.0944)
              y=(0.0215318 0.0218815 0.0232362 0.0234019 0.0234371 0.0230439 0.0223842 0.0220151 0.0216359 0.0210971 0.0195864 0.0195842 0.019582 0.01919 0.018008 0.0151073 -0.0653421)
        z_location: MultiplierFunction: scale=1.012199
          SimmSpline: x=(-2.0944 2.0944) y=(-0.0165 -0.0165)
    Millard2012EquilibriumMuscle med_gas_l: max_isometric_force=1558 optimal_fiber_length=0.06 tendon_slack_length=0.39
        pennation_angle_at_optimal=0.296706
      PathPoint P1: femur_l (-0.019 -0.3929 0.0235)
      PathPoint P2: femur_l (-0.035 -0.412 0.026)
      PathPoint P3: calcn_l (-0.037 0.009 -0.002)
    Millard2012EquilibriumMuscle lat_gas_l: max_isometric_force=683 optimal_fiber_length=0.064 tendon_slack_length=0.38
        pennation_angle_at_optimal=0.1396263
      PathPoint P1: femur_l (-0.022 -0.3946 -0.0272)
      PathPoint P2: femur_l (-0.035 -0.412 -0.027)
      PathPoint P3: calcn_l (-0.037 0.009 -0.002)
    Millard2012EquilibriumMuscle soleus_l: max_isometric_force=3549 optimal_fiber_length=0.05 tendon_slack_length=0.25
        pennation_angle_at_optimal=0.4363323
      PathPoint P1: tibia_l (-0.0024 -0.1533 -0.0071)
      PathPoint P2: calcn_l (-0.037 0.009 -0.002)
    Millard2012EquilibriumMuscle tib_post_l: max_isometric_force=1588 optimal_fiber_length=0.031
        tendon_slack_length=0.31 pennation_angle_at_optimal=0.2094395
      PathPoint P1: tibia_l (-0.0094 -0.1348 -0.0019)
      PathPoint P2: tibia_l (-0.0144 -0.4051 0.0229)
      PathPoint P3: talus_l (-0.00707004 -0.0135503 0.02068)
      PathPoint P4: midfoot_l (0.00525116 -0.00614186 0.0182003)
    Millard2012EquilibriumMuscle tib_ant_l: max_isometric_force=905 optimal_fiber_length=0.058
        tendon_slack_length=0.263 pennation_angle_at_optimal=0.08726646
      PathPoint P1: tibia_l (0.0179 -0.1624 -0.0115)
      PathPoint P2: tibia_l (0.0305443 -0.397232 0.0186437)
      PathPoint P3: midfoot_l (0.0162519 0.0160178 0.0283645)
      PathPoint P3_0: forefoot_l (0.00343243 -0.00334339 0.0302683)
    ObjectGroup R_hip_abd: members=(glut_max1_r glut_med1_r glut_med2_r glut_med3_r glut_min1_r glut_min2_r glut_min3_r peri_r sar_r tfl_r)
    ObjectGroup R_hip_flex: members=(add_brev_r add_long_r glut_med1_r glut_min1_r grac_r iliacus_r pect_r psoas_r rect_fem_r sar_r tfl_r)
    ObjectGroup R_hip_inrot: members=(glut_med1_r glut_min1_r iliacus_r psoas_r tfl_r)
    ObjectGroup R_hip_exrot: members=(gem_r glut_med3_r glut_min3_r peri_r quad_fem_r)
    ObjectGroup R_hip_ext: members=(add_long_r add_mag1_r add_mag2_r add_mag3_r bifemlh_r glut_max1_r glut_max2_r glut_max3_r glut_med3_r glut_min3_r semimem_r semiten_r)
    ObjectGroup R_hip_add: members=(add_brev_r add_long_r add_mag1_r add_mag2_r add_mag3_r bifemlh_r grac_r pect_r semimem_r semiten_r)
    ObjectGroup R_knee_bend: members=(bifemlh_r bifemsh_r grac_r lat_gas_r med_gas_r sar_r semimem_r semiten_r)
    ObjectGroup R_knee_ext: members=(rect_fem_r vas_int_r vas_lat_r vas_med_r)
    ObjectGroup R_ankle_pf: members=(lat_gas_r med_gas_r soleus_r tib_post_r)
    ObjectGroup R_inverter: members=(tib_ant_r tib_post_r)
    ObjectGroup R_ankle_df: members=tib_ant_r
    ObjectGroup R_everter
    ObjectGroup L_hip_abd: members=(glut_max1_l glut_med1_l glut_med2_l glut_med3_l glut_min1_l glut_min2_l glut_min3_l peri_l sar_l tfl_l)
    ObjectGroup L_hip_flex: members=(add_brev_l add_long_l glut_med1_l glut_min1_l grac_l iliacus_l pect_l psoas_l rect_fem_l sar_l tfl_l)
    ObjectGroup L_hip_inrot: members=(glut_med1_l glut_min1_l iliacus_l psoas_l tfl_l)
    ObjectGroup L_hip_exrot: members=(gem_l glut_med3_l glut_min3_l peri_l quad_fem_l)
    ObjectGroup L_hip_ext: members=(add_long_l add_mag1_l add_mag2_l add_mag3_l bifemlh_l glut_max1_l glut_max2_l glut_max3_l glut_med3_l glut_min3_l semimem_l semiten_l)
    ObjectGroup L_hip_add: members=(add_brev_l add_long_l add_mag1_l add_mag2_l add_mag3_l bifemlh_l grac_l pect_l semimem_l semiten_l)
    ObjectGroup L_knee_bend: members=(bifemlh_l bifemsh_l grac_l lat_gas_l med_gas_l sar_l semimem_l semiten_l)
    ObjectGroup L_knee_ext: members=(rect_fem_l vas_int_l vas_lat_l vas_med_l)
    ObjectGroup L_ankle_pf: members=(lat_gas_l med_gas_l soleus_l tib_post_l)
    ObjectGroup L_inverter: members=(tib_ant_l tib_post_l)
    ObjectGroup L_ankle_df: members=tib_ant_l
    ObjectGroup L_everter
  MarkerSet:
    Marker RASI: pelvis (0.0145217 0.00818357 0.122425)
    Marker LPSI: pelvis (-0.157919 0.0309128 -0.0516995)
    Marker RPSI: pelvis (-0.157919 0.0309128 0.0516995)
    Marker LASI: pelvis (0.0145217 0.00818357 -0.122425)
    Marker RTHI1: femur_r (-0.00736261 -0.104886 0.075103)
    Marker RTHI2: femur_r (0.050738 -0.188508 0.0685195)
    Marker RTHI3: femur_r (0.00280959 -0.277866 0.0664905)
    Marker RMKN: femur_r (0.0116348 -0.40977 -0.0487876)
    Marker RLKN: femur_r (0.00523164 -0.4078 0.0472545)
    Marker RSHA1: tibia_r (0.00639895 -0.154154 0.0524577) fixed=true
    Marker RSHA2: tibia_r (-0.0298832 -0.231999 0.0552939)
    Marker RSHA3: tibia_r (-0.00182031 -0.311403 0.0468976)
    Marker RMMAL: tibia_r (0.0043347 -0.389567 -0.0409704)
    Marker RLMAL: tibia_r (-0.00563584 -0.414472 0.0562633)
    Marker RHEEL: calcn_r (-0.0470117 0.00444262 -0.00496762)
    Marker RMET1: forefoot_r (0.0641773 -0.0106395 -0.0483439)
    Marker RMET5: forefoot_r (0.0474275 -0.0136689 0.0459558)
    Marker LTHI1: femur_l (-0.00387002 -0.104736 -0.0701778)
    Marker LTHI2: femur_l (0.0592037 -0.191532 -0.06815)
    Marker LTHI3: femur_l (0.0151799 -0.284209 -0.0617049)
    Marker LMKN: femur_l (0.0116348 -0.40977 0.0487876)
    Marker LLKN: femur_l (0.00523164 -0.4078 -0.0472545)
    Marker LSHA1: tibia_l (0.00541373 -0.141823 -0.0532715)
    Marker LSHA2: tibia_l (-0.0283276 -0.221741 -0.0530936)
    Marker LSHA3: tibia_l (0.00428767 -0.305606 -0.0529402)
    Marker LMMAL: tibia_l (0.0043347 -0.389567 0.0409704)
    Marker LLMAL: tibia_l (-0.00563584 -0.414472 -0.0562633)
    Marker LHEEL: calcn_l (-0.0470117 0.00444262 0.00496762)
    Marker LMET1: forefoot_l (0.0631497 -0.0129249 0.0497292)
    Marker LMET5: forefoot_l (0.0474275 -0.0136689 -0.0459558)
    Marker RGT: femur_r (-0.0116813 -0.0106415 0.0808206)
    Marker LGT: femur_l (-0.0116813 -0.0106415 -0.0808206)
